*HEADING
C3D4-Element, komplexe Belastung, Chaboche, verschiebungskontrolliert

**--------------------------------------------------------
*INCLUDE, INPUT=64_orientations.inp

**--------------------------------------------------------
*NODE,NSET=Nall
  1,  0.0, 0.0, 0.0
  2,  1.0, 0.0, 0.0
  3,  0.0, 1.0, 0.0
  4,  1.0, 1.0, 0.0
  5,  0.0, 0.0, 1.0
  6,  1.0, 0.0, 1.0
  7,  0.0, 1.0, 1.0
  8,  1.0, 1.0, 1.0
**
**
*ELEMENT, TYPE=C3D4, ELSET=Eall
  1,   1,  2,  4,  8
  2,   1,  6,  2,  8
  3,   1,  5,  6,  8
  4,   1,  4,  3,  8
  5,   1,  7,  5,  8
  6,   1,  3,  7,  8
**
*Elset, elset=poly5
1, 2
*Elset, elset=poly6
3, 5
*Elset, elset=poly4
4, 6
**
**
*NSET, NSET=top
  5, 6, 7, 8
*NSET, NSET=bottom
  1, 2, 3, 4
 *NSET, NSET=origin
  1
*NSET, NSET=pointX
  2
**--------------------------------------------------------
*INCLUDE, INPUT=64_solidsections.inp
*MATERIAL,NAME=SDCRCRY
*USER MATERIAL,CONSTANTS=0
*DEPVAR
  37
*INITIAL CONDITIONS,TYPE=SOLUTION,USER
**--------------------------------------------------------
*INITIAL CONDITIONS,TYPE=TEMPERATURE
  Nall, 973.15
*BOUNDARY
 bottom, 3,3
 origin, 1,1
 origin, 2,2
 pointX, 2,2
***********************************************************************
*STEP,INC=10000
  komplexe Belastung
*STATIC
 0.001, 0.02, 0.001, 0.001
*BOUNDARY, TYPE=DISPLACEMENT
top, 3,,0.01,
**
*CONTROLS, PARAMETERS=FIELD
1.e-9,0.01,0.01,,0.02,1.e-5,0.001,1.e-8
**
**
*EL PRINT, ELSET=Eall, POSITION=INTEGRATION POINTS, SUMMARY=NO, FREQ=1000
 S11,S22,S33, S12,S13,S23,
 E11,E22,E33, E12,E13,E23,
 SDV
**
*OUTPUT, FIELD,FREQUENCY=1
*ELEMENT OUTPUT, ELSET=Eall
  S, E, PE, PEEQ, ENER, SDV, TEMP,
*NODE OUTPUT, NSET=Nall
  U, NT, RF,
*END STEP
